#################################################################
################ Immutable Constant Variables ###################
#################################################################

#Charge
variable        c equal 1
variable        charge_pos equal  $c
variable        charge_neg equal -$c

#Mass
variable        mass_pos equal 22.9898
variable        mass_neg equal 35.453
# variable        mass_graph equal 12.0107

#LJ Sigmas
variable        diameter_pos equal 2.35
variable        diameter_neg equal 4.401
# variable        diameter_graph equal 3.214

#LJ Epsilon
variable        well_depth_pos equal .123
variable        well_depth_neg equal .1
# variable        well_depth_graph equal .0566

#################################################################
###################### General Setup ############################
#################################################################

#Water attributes


units           real
atom_style      full
boundary        p p p
pair_style      lj/cut/coul/long  ${lj_cutoff}
pair_modify     mix arithmetic tail yes
kspace_style    ewald 0.0001
bond_style      harmonic
angle_style     harmonic

#################################################################
############################ The Box ############################
#################################################################

# box, start molecules on simple cubic lattice

lattice         sc ${spacing}
# region          box block 0 ${boxlength} 0 ${boxlength} 0 ${boxlength} units box
region          box block 0 100.7 0 102.1 0 6.7 units box
region          safe_space block 0 ${boxlength} 0 ${boxlength} 0 ${boxlength} units box


create_box      4 box                       &
                bond/types 1                &
                angle/types 1               &
                extra/bond/per/atom 2       &
                extra/angle/per/atom 1      &
                extra/special/per/atom 2

#################################################################
####################### Assign Constants ########################
#################################################################

# pair coefficients

pair_coeff      1 1 0.15535 3.166
pair_coeff      2 2 0.0 0.0
pair_coeff      3 3 ${well_depth_pos} ${diameter_pos}
pair_coeff      4 4 ${well_depth_neg} ${diameter_neg}

# other coeffs

bond_coeff      1     1000       1.0
angle_coeff     1      100       109.47

# masses

mass            1 15.9994
mass            2 1.0
mass            3 ${mass_pos}
mass            4 ${mass_neg}

#################################################################
######################### Create Atoms ##########################
#################################################################
variable        water_density equal 1
variable        water_num equal floor(v_water_density*${boxlength}^3/18) #mass
variable        water_num equal 25

# water
molecule        h2omol H2O.txt
# create_atoms    0 random ${water_num} 12345 NULL mol h2omol 1123
create_atoms   	0 box mol h2omol ${seed} units box

# ions
create_atoms    3 random ${NN} ${seed}  NULL
create_atoms    4 random ${NN} ${seed2} NULL

#################################################################
######################### Group Atoms ##########################
#################################################################

group           h2o type 1 2
group           positive type 3
group           negative type 4
group           ions union positive negative
group           moving union ions h2o

#################################################################
######################### More Settings #########################
#################################################################

# Add charge

set             type 3 charge ${charge_pos}
set             type 4 charge ${charge_neg}

# MD settings

velocity       	moving create ${temp} ${seed2}
timestep        ${timestep}

# Put variables in place
minimize        0.0 0.0 100 1000
reset_timestep  0
